# -var l 2.8712 -var t 700
# -var l 2.8947 -var t 1300
# -var l 2.9151 -var t 1700
#------------------------------------------------
#log ./data_$t/logs/log_clear
variable cell_size equal 10
variable total_time equal 1 #ps
variable total_timesteps equal ${total_time}/dt
units           metal
boundary        p p p
atom_style      atomic
#------------------------------------------------
lattice         bcc $l
region          box block 0 ${cell_size} 0 ${cell_size} 0 ${cell_size}
create_box      1 box
create_atoms    1 box
mass            1 55.845
#------------------------------------------------
pair_style      eam/fs
pair_coeff      * * ../Fe_mm.eam.fs Fe
#------------------------------------------------
min_style cg
minimize 1e-9 1e-9 5000 5000
run 0
reset_timestep 0
#------------------------------------------------
velocity        all create $(2*v_t) 352839
timestep 0.001
fix             1 all nve
#------------------------------------------------
#dump		d0 all custom 1000 ./data_$t/dumps/clear.dump x y z
dump		d0 all custom 1000 ../clear.dump x y z
thermo_style custom time temp press
thermo 1000
run ${total_timesteps}
#------------------------------------------------
